OpenVSP model (file version 5), 7 components.
Geometry view with OpenVSP parameter names; values to 6 digits, angles in degrees, lengths in the model's unit.
Overall bounding box: X_Min=0 X_Len=42.3662 Y_Min=-21.6117 Y_Len=43.2234 Z_Min=-3.8 Z_Len=12.5301

Fuselage "Fuselage"
  location (X Y Z) 0 0 0, rotation 0 0 0
  bounding box size 42.2 6.1 6.1
  Design: Length=42.2
  cross sections:
    n   XLocPercent  YLocPercent  ZLocPercent   shape
    0   0            0            -0.014218     point
    1   0.0130332    0            -0.0127488    ellipse Ellipse_Height=1.216 Ellipse_Width=1.216
    2   0.0331754    0            -0.0106398    ellipse Ellipse_Height=2.296 Ellipse_Width=2.296
    3   0.063981     0            -0.00779621   ellipse Ellipse_Height=3.5 Ellipse_Width=3.5
    4   0.101896     0            -0.00488152   ellipse Ellipse_Height=4.569 Ellipse_Width=4.569
    5   0.14455      0            -0.00244076   ellipse Ellipse_Height=5.384 Ellipse_Width=5.384
    6   0.191943     0            -0.000687204  ellipse Ellipse_Height=5.907 Ellipse_Width=5.907
    7   0.246445     0            0             ellipse Ellipse_Height=6.1 Ellipse_Width=6.1
    8   0.331754     0            0             as above
    9   0.438389     0            0             as above
    10  0.554502     0            0             as above
    11  0.627962     0            0.0014218     ellipse Ellipse_Height=5.78 Ellipse_Width=5.78
    12  0.699052     0            0.00616114    ellipse Ellipse_Height=5.14 Ellipse_Width=5.14
    13  0.758294     0            0.0113744     ellipse Ellipse_Height=4.45 Ellipse_Width=4.45
    14  0.829384     0            0.0201422     ellipse Ellipse_Height=3.5 Ellipse_Width=3.5
    15  0.900474     0            0.0305687     ellipse Ellipse_Height=2.48 Ellipse_Width=2.48
    16  0.959716     0            0.0398104     ellipse Ellipse_Height=1.5 Ellipse_Width=1.5
    17  1            0            0.0469194     point

Fuselage "BellyFairing"
  location (X Y Z) 16 0 -2.2, rotation 0 0 0
  bounding box size 14.5 7 3.3
  Design: Length=14.5
  cross sections:
    n  XLocPercent  YLocPercent  ZLocPercent  shape
    0  0            0            0.0172414    point
    1  0.110345     0            0.00551724   rounded rectangle RoundRectXSec_Radius=0.8 RoundedRect_Height=2 RoundedRect_Width=4.2
    2  0.248276     0            0            rounded rectangle RoundRectXSec_Radius=1.2 RoundedRect_Height=2.9 RoundedRect_Width=6.3
    3  0.413793     0            0            rounded rectangle RoundRectXSec_Radius=1.45 RoundedRect_Height=3.2 RoundedRect_Width=7
    4  0.593103     0            0.00344828   as above
    5  0.758621     0            0.0206897    rounded rectangle RoundRectXSec_Radius=1.25 RoundedRect_Height=2.8 RoundedRect_Width=5.9
    6  0.896552     0            0.0413793    rounded rectangle RoundRectXSec_Radius=0.75 RoundedRect_Height=1.8 RoundedRect_Width=3.8
    7  1            0            0.0724138    point

Wing "MainWing"
  location (X Y Z) 19 0 -2.6, rotation 0 0 0
  symmetric about XZ
  bounding box size 8.97986 43.2234 3.78496
  totals: TotalSpan=46.3324 TotalProjectedSpan=43.1172 TotalChord=3.17365 TotalArea=201.761 TotalAR=9.21431 MAC=4.89346
  root: chord 6.9086, twist 0, airfoil file "NASA SC(2)-0412"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 BaseThickChord=0.120007 ThickChord=0.120007
  sections:
    n  Span     Root_Chord  Tip_Chord  Area    Sweep  Sweep_Location  Dihedral  Twist  Twist_Location  tip airfoil
    1  20.7662  6.9086      2.418      96.839  13.8   0.25            3         -3     0.25            as above
    2  2.4      2.418       0.95       4.0416  31     0.25            70        -5     0.25            as above

Fuselage "Nacelle"
  location (X Y Z) 25.1 6.9 0.1, rotation 0 0 0
  symmetric about XZ
  bounding box size 7.5 16.7 2.9
  Design: Length=7.5
  cross sections:
    n  XLocPercent  YLocPercent  ZLocPercent  shape
    0  0            0            0            point
    1  0.0933333    0            0            ellipse Ellipse_Height=2.1 Ellipse_Width=2.1
    2  0.373333     0            0            ellipse Ellipse_Height=2.9 Ellipse_Width=2.9
    3  0.746667     0            0            ellipse Ellipse_Height=2.6 Ellipse_Width=2.6
    4  1            0            0            point

Wing "Pylon"
  location (X Y Z) 24 6.9 -2, rotation 90 0 0
  symmetric about XZ
  bounding box size 3.6 14.1602 1.5
  totals: TotalSpan=3 TotalProjectedSpan=3 TotalChord=3 TotalArea=9 TotalAR=1 MAC=3.04
  root: chord 3.6, twist 0, NACA 4-series Camber=0 CamberLoc=0.2 ThickChord=0.1
  sections:
    n  Span  Root_Chord  Tip_Chord  Area  Sweep  Sweep_Location  Dihedral  Twist  Twist_Location  tip airfoil
    1  1.5   3.6         2.4        4.5   35     0               0         0      0.25            as above

Wing "VertTail"
  location (X Y Z) 31.6 0 2, rotation 90 0 0
  bounding box size 9.90135 0.760441 6.5
  totals: TotalSpan=6.5 TotalProjectedSpan=6.5 TotalChord=6.1 TotalArea=39.65 TotalAR=1.06557 MAC=6.22295
  root: chord 7.6, twist 0, NACA 4-series Camber=0 CamberLoc=0.2 ThickChord=0.1
  sections:
    n  Span  Root_Chord  Tip_Chord  Area   Sweep  Sweep_Location  Dihedral  Twist  Twist_Location  tip airfoil
    1  6.5   7.6         4.6        39.65  35     0.25            0         0      0.25            as above

Wing "HorizTail"
  location (X Y Z) 36.8 0 8.5, rotation 0 0 0
  symmetric about XZ
  bounding box size 5.56617 15.2 0.460267
  totals: TotalSpan=15.2 TotalProjectedSpan=15.2 TotalChord=3.4 TotalArea=51.68 TotalAR=4.47059 MAC=3.54118
  root: chord 4.6, twist 0, NACA 4-series Camber=0 CamberLoc=0.2 ThickChord=0.1
  sections:
    n  Span  Root_Chord  Tip_Chord  Area   Sweep  Sweep_Location  Dihedral  Twist  Twist_Location  tip airfoil
    1  7.6   4.6         2.2        25.84  20     0.25            0         0      0.25            as above
