OpenVSP model (file version 5), 10 components.
Geometry view with OpenVSP parameter names; values to 6 digits, angles in degrees, lengths in the model's unit.
Overall bounding box: X_Min=-0.345072 X_Len=44.5866 Y_Min=-21.6117 Y_Len=43.2234 Z_Min=-4.06907 Z_Len=14.274

Fuselage "Fuselage old"
  location (X Y Z) 0 0 0, rotation 0 0 0
  bounding box size 42.2 6.1 6.1
  Design: Length=42.2
  cross sections:
    n  XLocPercent  YLocPercent  ZLocPercent  shape
    0  0            0            -0.0308057   point
    1  0.0473934    0            -0.021872    ellipse Ellipse_Height=2.302 Ellipse_Width=2.302
    2  0.149289     0            -0.00694313  ellipse Ellipse_Height=5.218 Ellipse_Width=5.218
    3  0.194313     0            -0.0057346   ellipse Ellipse_Height=5.584 Ellipse_Width=5.851
    4  0.246445     0            0            ellipse Ellipse_Height=6.1 Ellipse_Width=6.1
    5  0.402844     0            0            as above
    6  0.554502     0            0            as above
    7  0.722749     0            0.0113033    ellipse Ellipse_Height=4.696 Ellipse_Width=4.696
    8  0.864929     0            0.0279384    ellipse Ellipse_Height=2.386 Ellipse_Width=2.386
    9  1            0            0.0414692    point

Fuselage "BellyFairing"
  location (X Y Z) 11.0148 0 -2.2, rotation 0 0 0
  bounding box size 17.0714 5.80099 4.01801
  Design: Length=17.0714
  cross sections:
    n  XLocPercent  YLocPercent  ZLocPercent  shape
    0  0            0            0.0172414    point
    1  0.206897     0            0.00344828   rounded rectangle RoundRectXSec_Radius=1.08 RoundedRect_Height=2.4 RoundedRect_Width=5.2
    2  0.5          0            0.00819672   rounded rectangle RoundRectXSec_Radius=1.44 RoundedRect_Height=3.87918 RoundedRect_Width=5.13469
    3  0.793103     0            0.0193103    rounded rectangle RoundRectXSec_Radius=1.24 RoundedRect_Height=2.75 RoundedRect_Width=5.8
    4  1            0            0.0724138    point

Wing "MainWing"
  location (X Y Z) 15.9 0 -2.6, rotation 0 0 0
  symmetric about XZ
  bounding box size 8.97986 43.2234 3.78496
  totals: TotalSpan=46.3324 TotalProjectedSpan=43.1172 TotalChord=3.17365 TotalArea=201.761 TotalAR=9.21431 MAC=4.89346
  root: chord 6.9086, twist 0, airfoil file "NASA SC(2)-0412"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 BaseThickChord=0.120007 ThickChord=0.120007
  sections:
    n  Span     Root_Chord  Tip_Chord  Area    Sweep  Sweep_Location  Dihedral  Twist  Twist_Location  tip airfoil
    1  20.7662  6.9086      2.418      96.839  13.8   0.25            3         -3     0.25            as above
    2  2.4      2.418       0.95       4.0416  31     0.25            70        -5     0.25            as above

Fuselage "Nacelle"
  location (X Y Z) 22 6.9 1, rotation 0 0 0
  symmetric about XZ
  bounding box size 7.5 16.7 2.9
  Design: Length=7.5
  cross sections:
    n  XLocPercent  YLocPercent  ZLocPercent  shape
    0  0            0            0            point
    1  0.0933333    0            0            ellipse Ellipse_Height=2.1 Ellipse_Width=2.1
    2  0.373333     0            0            ellipse Ellipse_Height=2.9 Ellipse_Width=2.9
    3  0.746667     0            0            ellipse Ellipse_Height=2.6 Ellipse_Width=2.6
    4  1            0            0            point

Wing "Pylon"
  location (X Y Z) 20.9 6.9 -2, rotation 90 0 0
  symmetric about XZ
  bounding box size 4.64066 14.1242 3.2
  totals: TotalSpan=6.4 TotalProjectedSpan=6.4 TotalChord=3 TotalArea=19.2 TotalAR=2.13333 MAC=3.04
  root: chord 3.6, twist 0, NACA 4-series Camber=0 CamberLoc=0.2 ThickChord=0.09
  sections:
    n  Span  Root_Chord  Tip_Chord  Area  Sweep  Sweep_Location  Dihedral  Twist  Twist_Location  tip airfoil
    1  3.2   3.6         2.4        9.6   35     0               0         0      0.25            as above

Wing "VertTail"
  location (X Y Z) 31.6 0 2, rotation 90 0 0
  bounding box size 12.0776 0.927538 7.93
  totals: TotalSpan=7.93 TotalProjectedSpan=7.93 TotalChord=7.44 TotalArea=58.9992 TotalAR=1.06586 MAC=7.59004
  root: chord 9.27, twist 0, NACA 4-series Camber=0 CamberLoc=0.2 ThickChord=0.1
  sections:
    n  Span  Root_Chord  Tip_Chord  Area     Sweep  Sweep_Location  Dihedral  Twist  Twist_Location  tip airfoil
    1  7.93  9.27        5.61       58.9992  35     0.25            0         0      0.25            as above

Wing "DorsalFin"
  location (X Y Z) 26.5 0 2.6, rotation 90 0 0
  bounding box size 7.41617 0.310443 1.5
  totals: TotalSpan=1.5 TotalProjectedSpan=1.5 TotalChord=3.8 TotalArea=5.7 TotalAR=0.394737 MAC=4.30526
  root: chord 6.2, twist 0, NACA 4-series Camber=0 CamberLoc=0.2 ThickChord=0.05
  sections:
    n  Span  Root_Chord  Tip_Chord  Area  Sweep  Sweep_Location  Dihedral  Twist  Twist_Location  tip airfoil
    1  1.5   6.2         1.4        5.7   76     0               0         0      0.25            as above

Wing "HorizTail"
  location (X Y Z) 38.1 0 9.93, rotation 0 0 0
  symmetric about XZ
  bounding box size 6.14156 15.3651 0.549911
  totals: TotalSpan=15.3651 TotalProjectedSpan=15.3651 TotalChord=4.0622 TotalArea=62.4161 TotalAR=3.78245 MAC=4.23088
  root: chord 5.49592, twist 0, NACA 4-series Camber=0 CamberLoc=0.2 ThickChord=0.1
  sections:
    n  Span     Root_Chord  Tip_Chord  Area    Sweep  Sweep_Location  Dihedral  Twist  Twist_Location  tip airfoil
    1  7.68254  5.49592     2.62849    31.208  20     0.25            0         0      0.25            as above

Fuselage "Fuselage"
  location (X Y Z) 0 0 0, rotation 0 0 0
  bounding box size 42.5451 6.1 6.49016
  Design: Length=42.2
  cross sections:
    n  XLocPercent  YLocPercent  ZLocPercent  shape
    0  0            0            -0.0457015   ellipse Ellipse_Height=1.18617 Ellipse_Width=1.15014
    1  0.135951     0            -0.0264218   ellipse Ellipse_Height=3.70512 Ellipse_Width=4.88275
    2  0.257148     0            0            ellipse Ellipse_Height=6.04571 Ellipse_Width=5.70454
    3  0.402844     0            0            ellipse Ellipse_Height=6.1 Ellipse_Width=6.1
    4  0.554502     0            0            as above
    5  0.722749     0            0.0113033    ellipse Ellipse_Height=4.696 Ellipse_Width=4.696
    6  1            0            0.0425465    circle Circle_Diameter=1.66646

NGonMesh "MeshGeom_NGon"
  location (X Y Z) 0 0 0, rotation 0 0 0

VSPAERO settings (reference component "MainWing"): Sref=201.761 bref=46.3324 cref=4.89346 Xcg=0 Ycg=0 Zcg=0 AlphaStart=0 AlphaEnd=10 AlphaNpts=3 BetaStart=0 BetaEnd=0 BetaNpts=1 MachStart=0 MachEnd=0 MachNpts=1 ReCref=1e+07 Vinf=100 Rho=0.002377
